units           real
atom_style      full
read_restart    results/raw/SIM-02/checkpoint-12-four-rank-high-cadence/stage-b-2ps-four-rank.restart
kspace_style    pppm 1.0e-5
neighbor        4.0 bin
neigh_modify    one 7500

compute         bridge_temp all temp
variable        vcomx equal vcm(all,x)
variable        vcomy equal vcm(all,y)
variable        vcomz equal vcm(all,z)
variable        comspeed equal sqrt(v_vcomx*v_vcomx+v_vcomy*v_vcomy+v_vcomz*v_vcomz)
thermo_style    custom step time atoms temp press pe ke etotal vol lx ly lz v_vcomx v_vcomy v_vcomz v_comspeed
thermo_modify   temp bridge_temp flush yes
thermo          1000

fix             integrate all nve
fix             constraints all rattle 1.0e-10 400 0 b 1 a 1
run             0 post no
velocity        all scale 400.0
velocity        all zero angular
velocity        all zero linear
fix             com_guard all halt 1 v_comspeed > 1.0e-6 error soft message yes
run             5000
unfix           com_guard
write_restart   results/raw/SIM-02/preflight-restart-continuity-2026-10-05/split-5ps.restart
print           "SIM02_PREFLIGHT split_first final_step=$(step) com_speed=$(v_comspeed:%.16g)"
